AddBusMarker Bus=121961361 code=15 color=Red size=4 !buses=[121961361 4330690]
New monitor.PMONITOR745437 element=transformer.TRF_745437A terminal=1 mode=1 ppolar=no


!Numero de transformadores no bairro: 1
