AddBusMarker Bus=128399044 code=15 color=Red size=4 !buses=[128399044 70266998]
New monitor.PMONITOR974413 element=transformer.TRF_974413A terminal=1 mode=1 ppolar=no

AddBusMarker Bus=128399037 code=15 color=Red size=4 !buses=[128399037 725928]
New monitor.PMONITOR166684 element=transformer.TRF_166684A terminal=1 mode=1 ppolar=no


!Numero de transformadores no bairro: 2
